*Heading
** Job name: gongziliang Model name: Model-1
** Generated by: Abaqus/CAE 6.14-4
*Preprint, echo=NO, model=NO, history=NO, contact=NO
**
** PARTS
**
*Part, name=Part-1
*Node
      1,         -40.,         140.,        1800.
      2,          40.,         140.,        1800.
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*Element, type=C3D8
   1,    8,  401, 3705,  584,    1,   25, 2273,  398
   2,  401,  400, 3706, 3705,   25,   26, 2274, 2273
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*Nset, nset=Set-1, generate
     1,  11222,      1
*Elset, elset=Set-1, generate
    1,  5400,     1
** Section: Section-1
*Solid Section, elset=Set-1, material=Material-1
,
*End Part
**
**
** ASSEMBLY
**
*Assembly, name=Assembly
**
*Instance, name=Part-1-1, part=Part-1
*End Instance
**
*Nset, nset=Set-2, instance=Part-1-1
  1,  2,  8,  9, 13, 19, 23, 24
*Nset, nset=Set-3, instance=Part-1-1
    3,    4,    6,    7,   11,   12
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*Elset, elset=Set-3, instance=Part-1-1
 1612, 1613, 1614, 1615, 1616, 1617
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*Nset, nset=Set-4, instance=Part-1-1
    3,    4,    6,    7,   11,   12
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*Elset, elset=Set-4, instance=Part-1-1
 1612, 1613, 1614, 1615, 1616, 1617
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*End Assembly
**
** MATERIALS
**
*Material, name=Material-1
*Elastic
200000., 0.33
** ----------------------------------------------------------------
**
** STEP: Step-1
**
*Step, name=Step-1, nlgeom=NO
*Static
1., 1., 1e-05, 1.
**
** BOUNDARY CONDITIONS
**
** Name: BC-1 Type: 对称/反对称/完全固定
*Boundary
Set-4, ENCASTRE
**
** LOADS
**
** Name: Load-1   Type: Concentrated force
*Cload
Set-2, 2, -625.
**
** OUTPUT REQUESTS
**
*Restart, write, frequency=0
**
** FIELD OUTPUT: F-Output-1
**
*Output, field, variable=PRESELECT
**
** HISTORY OUTPUT: H-Output-1
**
*Output, history, variable=PRESELECT
*End Step
