*Heading
** Job name: bridge Model name: bridge
** Generated by: Abaqus/CAE 2022
*Preprint, echo=NO, model=NO, history=NO, contact=NO
**
** PARTS
**
*Part, name=bridge
*Node
      1,           0.,          80.,          50.
      2,           0.,          50.,          50.
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*Element, type=C3D8
   1, 1092, 1241, 1047, 1198, 4932, 5081, 4887, 5038
   2,   76,  946,  948,   77, 2549, 4786, 4788, 2548
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*Nset, nset=Set-6, generate
     1,  11620,      1
*Elset, elset=Set-6, generate
    1,  9162,     1
*Nset, nset=Cast
    3,    4,   35,   36,   37,   38
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*Nset, nset=Load
    1,    5,   33,   34,   39,   66
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** Section: Steel-45
*Solid Section, elset=Set-6, controls=EC-1, material=SI_mm111111_45
,
*End Part
**
**
** ASSEMBLY
**
*Assembly, name=Assembly
**
*Instance, name=bridge-1, part=bridge
*End Instance
**
*End Assembly
**
** ELEMENT CONTROLS
**
*Section Controls, name=EC-1, DISTORTION CONTROL=NO, ELEMENT DELETION=NO
1., 1., 1.
**
** MATERIALS
**
*Material, name=SI_mm111111_45
*Elastic
210000., 0.3
**
** BOUNDARY CONDITIONS
**
** Name: BC-1 Type: Displacement/Rotation
*Boundary
bridge-1.Cast, 1, 1
bridge-1.Cast, 2, 2
bridge-1.Cast, 3, 3
** ----------------------------------------------------------------
**
** STEP: Step-1
**
*Step, name=Step-1, nlgeom=NO
*Static
1., 1., 1e-05, 1.
**
** LOADS
**
** Name: Load-1   Type: Concentrated force
*Cload
bridge-1.Load, 2, -10.7526
**
** OUTPUT REQUESTS
**
*Restart, write, frequency=0
**
** FIELD OUTPUT: F-Output-1
**
*Output, field, variable=PRESELECT
**
** HISTORY OUTPUT: H-Output-1
**
*Output, history, variable=PRESELECT
*End Step
