// COMSOL Multiphysics 6.1.0.252 model "FEM.mph"
// Outline of the model tree

Geometry
  geom1 "几何1" (3D, length unit m)
    blk1: Block "悬臂梁" | size = {2.5, 0.2, 0.4}
    cyl1: Cylinder "孔1" | pos = {1, -0.1, 0.2}; axistype = y; r = 0.1; h = 0.4
    cyl2: Cylinder "孔2" | pos = {2, -0.1, 0.2}; axistype = y; r = 0.1; h = 0.4
    dif1: Difference "差集 1" | input = blk1; input2 = cyl1, cyl2
    fin: Finalize "形成联合体"

Materials
  mat1: Common "1030 [solid,oxidized]" on all domains
    def "基本"
      thermalconductivity = k(T)
      resistivity = res(T)
      thermalexpansioncoefficient = (alpha(T)+(Tempref-293[K])*if(abs(T-Tempref)>1e-3,(alpha(T)-alpha(Tempref))/(T-Tempref),d(alpha(T),T)))/(1+alpha(Tempref)*(Tempref-293[K]))
      heatcapacity = C(T)
      electricconductivity = sigma(T)
      emissivity = epsilon_solid_oxidized_1(T)
      density = 0
      TD = TD(T)
      k: Piecewise
        arg = T
        pieces = 
          {293.0, 1073.0, 56.38699-0.00728786*T^1-1.988814E-5*T^2}
          {1073.0, 1473.16, -82.99624+0.1669461*T^1-6.125136E-5*T^2}
        argunit = K
        fununit = W/(m*K)
      res: Piecewise
        arg = T
        pieces = 
          {293.0, 1073.0, 8.77895E-8+4.636594E-11*T^1+7.977766E-13*T^2+3.797984E-17*T^3}
          {1073.0, 1473.16, 3.095638E-7+1.050608E-9*T^1-2.900672E-13*T^2}
        argunit = K
        fununit = ohm*m
      alpha: Piecewise
        arg = T
        pieces = 
          {0.0, 680.0, 6.731035E-6+3.918624E-8*T^1-1.534406E-10*T^2+3.517965E-13*T^3-3.827522E-16*T^4+1.565546E-19*T^5}
          {680.0, 977.0, 8.614185E-6+1.013631E-8*T^1-2.26181E-12*T^2-1.569696E-15*T^3}
          {977.0, 1061.0, 6.292031E-5-4.915637E-8*T^1}
          {1061.0, 1144.0, -1.563678E-6+1.162025E-8*T^1}
        argunit = K
        fununit = 1/K
      C: Piecewise | arg = T; pieces = {293.0, 848.16, -215.730638+6.0184999*T^1-0.0183429321*T^2+2.414973E-5*T^3-1.07882432E-8*T^4}; argunit = K; fununit = J/(kg*K)
      sigma: Piecewise
        arg = T
        pieces = 
          {293.0, 1073.0, 1/(3.797984E-17*T^3+7.977766E-13*T^2+4.636594E-11*T+8.778950E-08)}
          {1073.0, 1473.16, 1/(-2.900672E-13*T^2+1.050608E-09*T+3.095638E-07)}
        argunit = K
        fununit = S/m
      epsilon_solid_oxidized_1: Piecewise | arg = T; pieces = {588.0, 1088.71, 1.395221-0.003891153*T^1+8.010151E-6*T^2-5.970098E-9*T^3+1.373119E-12*T^4}; argunit = K
      rho: Piecewise
        arg = T
        pieces = 
          {0.0, 60.0, 7907.978-0.01549395*T^1}
          {60.0, 977.0, 7911.3-0.01678428*T^1-8.018711E-4*T^2+1.172796E-6*T^3-1.015971E-9*T^4+3.677737E-13*T^5}
          {977.0, 1061.0, 7116.994+0.5195388*T^1}
          {1061.0, 1144.0, 8166.523-0.4696497*T^1}
        argunit = K
        fununit = kg/m^3
      TD: Piecewise | arg = T; pieces = {293.0, 948.16, 4.230497E-5-2.680725E-7*T^1+9.704424E-10*T^2-1.722E-12*T^3+1.434083E-15*T^4-4.533549E-19*T^5}; argunit = K; fununit = m^2/s
    ThermalExpansion "热膨胀"
      alphatan = CTE(T)
      dL = (dL(T)-dL(Tempref))/(1+dL(Tempref))
      dL: Piecewise
        arg = T
        pieces = 
          {0.0, 50.0, -0.002022973+3.918919E-7*T^1}
          {50.0, 212.0, -0.002063267-3.508062E-7*T^1+2.838477E-8*T^2}
          {212.0, 977.0, -0.00252395773+5.644256E-6*T^1+1.0799E-8*T^2-1.801872E-12*T^3-1.569701E-15*T^4}
          {977.0, 1061.0, 0.03264232-2.297313E-5*T^1}
          {1061.0, 1144.0, -0.01351301+2.053771E-5*T^1}
        argunit = K
      CTE: Piecewise | arg = T; pieces = {293.0, 1065.0, 5.044861E-6+2.5188E-8*T^1-1.418195E-11*T^2}; argunit = K; fununit = 1/K
    Enu "杨氏模量和泊松比"
      E = 3E9
      nu = 0.2
      E: Piecewise
        arg = T
        pieces = 
          {4.0, 273.0, 2.217366E11+5020008.0*T^1-305140.4*T^2+926.6601*T^3-1.145454*T^4}
          {273.0, 1050.0, 2.109875E11+3.572844E7*T^1-106319.6*T^2}
          {1050.0, 1500.0, 2.024261E11-6.77381E7*T^1}
        argunit = K
        fununit = Pa
      nu: Piecewise
        arg = T
        pieces = 
          {4.0, 120.0, 0.2850355-1.662951E-6*T^1}
          {120.0, 273.0, 0.2848011-7.147353E-6*T^1+6.558945E-8*T^2}
          {273.0, 1053.0, 0.2712267+7.030261E-5*T^1-3.856929E-8*T^2+1.246582E-11*T^3}
          {1053.0, 1500.0, 0.3165268-1.242823E-6*T^1+1.661461E-9*T^2}
        argunit = K
    KG "体积模量和剪切模量"
      K = kappa(T)
      G = mu(T)
      mu: Piecewise
        arg = T
        pieces = 
          {4.0, 273.0, 8.626526E10+1636497.0*T^1-108981.6*T^2+291.1261*T^3-0.3377859*T^4}
          {273.0, 1050.0, 8.301552E10+9184755.0*T^1-38834.5*T^2}
          {1050.0, 1500.0, 7.694034E10-2.580357E7*T^1}
        argunit = K
        fununit = Pa
      kappa: Piecewise
        arg = T
        pieces = 
          {4.0, 100.0, 1.800573E11-3478717.0*T^1+151512.1*T^2-5485.327*T^3+28.28329*T^4}
          {100.0, 273.0, 1.818111E11-4.023792E7*T^1+84204.68*T^2-93.09453*T^3}
          {273.0, 1500.0, 1.842649E11-2.509462E7*T^1-28588.37*T^2}
        argunit = K
        fununit = Pa

Physics
  solid: SolidMechanics "固体力学" on all domains
    dependent variable u = {u, v, w}
    ShapeProperty.order_displacement = 2
    lemm1: LinearElasticModel "线弹性材料 1" (default) | reducedIntegration = 0
    free1: Free "自由 1" (default)
    init1: init "初始值 1" (default)
    fix1: Fixed "固定约束 1" on boundaries 1
    pl1: PointLoad "端部集中载荷" on points 22, 24 | Fp = {0, 0, -10E3}

Mesh
  mesh1 "网格 1"
    size: MeshSizeDefault "大小" | hmax = 0.1; hmin = 0.8; custom = on
    ftet1: FreeTet "2阶四面体单元网格" on entire geometry | method = del; optlevel = high; optlarge = on; optsmall = on

Studies
  std1 "研究 1"
    stat: Stationary "稳态" | errestandadap = none; meshadaptmethod = regular

Solver configurations
  sol1 "解 1" (study std1)
    v1: Variables "因变量 1"
    s1: Stationary "稳态求解器 1" | stol = 1E-6
      fc1: FullyCoupled "全耦合 1" | linsolver = d1
      d1: Direct "建议的直接求解器 (solid)" | linsolver = pardiso; pivotperturb = 1.0E-9

Datasets
  dset1: Solution | solution = sol1
  mesh1: Mesh "网格 1" | mesh = mesh1

Plots
  pg1: PlotGroup3D "应力 (solid)" | data = dset1
    vol1: Volume "体 1" | expr = solid.mises
      def: Deform "变形" | expr = {u, v, w}
  pg3: PlotGroup3D "网格图 3" | data = mesh1
    mesh1: Mesh "网格 1" | data = dset1; meshdomain = volume; elemtype3 = tet; nodepoints = geom; sphereradiusscale = 3
  pg4: PlotGroup3D "位移 (solid)" | data = dset1
    vol1: Volume "体 1" | expr = solid.disp
      def: Deform "变形" | expr = {u, v, w}; descr = 坐标 （空间坐标系）
  pg5: PlotGroup3D "网格图 5" | data = mesh1
    mesh1: Mesh "网格 1" | meshdomain = volume
  pg6: PlotGroup3D "点载荷 (solid)" | data = dset1
    arpt1: ArrowPoint "端部集中载荷" | expr = {solid.pl1.F_Px, solid.pl1.F_Py, solid.pl1.F_Pz}
      col: Color "颜色表达式" | expr = sqrteps(real(solid.pl1.F_Px)^2+real(solid.pl1.F_Py)^2+real(solid.pl1.F_Pz)^2)
      def: Deform "变形" | expr = {u, v, w}; descr = 位移场
    surf1: Surface "灰色表面" | expr = 1
      def: Deform "变形" | expr = {u, v, w}; descr = 位移场
      sel1: Selection "选择 1" on boundaries 1-14
      tran1: Transparency "透明 1" | transparency = 0.8

Exports
  mesh1: Mesh "网格 1" | data = dset1; type3D = mphascii; filename = E:\Demo\Matlab\2023_FEM\单元2.mphtxt
  data1: Data "数据 1"
    data = dset1
    expr = {u, v, w, solid.mises}
    unit = {mm, mm, mm, N/m^2}
    descr = {位移场，X 分量, 位移场，Y 分量, 位移场，Z 分量, von Mises 应力}
    filename = E:\Demo\Matlab\2023_FEM\位移和力.txt