*Heading
** Job name: Job-1 Model name: Model-1
** Generated by: Abaqus/CAE 6.14-4
*Preprint, echo=NO, model=NO, history=NO, contact=NO
**
** PARTS
**
*Part, name=Part-1
*End Part
**
*Part, name=Part-2
*End Part
**
*Part, name=Part-3
*End Part
**
**
** ASSEMBLY
**
*Assembly, name=Assembly
**
*Instance, name=Part-1-1, part=Part-1
*Node
      1,   13.8276367,  -2.19008255,         100.
      2,   13.3147917,  -4.32623816,         100.
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*Element, type=S4R
   1,   40,    1,   41,   80
   2,    1,    2,   42,   41
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*Nset, nset=_PickedSet2, internal, generate
    1,  1840,     1
*Elset, elset=_PickedSet2, internal, generate
    1,  1800,     1
** Section: Section-1
*Shell Section, elset=_PickedSet2, material=Material-1
0.02, 3
*End Instance
**
*Instance, name=Part-2-1, part=Part-2
*Node
      1,          30.,          20.,           0.
      2,          24.,          20.,           0.
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*Element, type=S4R
  1,   1,   2,  13,  12
  2,   2,   3,  14,  13
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*Node
    122,           0.,           0.,           0.
*Nset, nset=Part-2-1-RefPt_, internal
122,
*Nset, nset=_PickedSet3, internal, generate
   1,  121,    1
*Elset, elset=_PickedSet3, internal, generate
   1,  100,    1
** Section: Section-1
*Shell Section, elset=_PickedSet3, material=Material-1
0.02, 3
*End Instance
**
*Instance, name=Part-3-1, part=Part-3
          0.,           0.,         100.
*Node
      1,          30.,          20.,           0.
      2,          24.,          20.,           0.
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*Element, type=S4R
  1,   1,   2,  13,  12
  2,   2,   3,  14,  13
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*Node
    122,           0.,           0.,           0.
*Nset, nset=Part-3-1-RefPt_, internal
122,
*Nset, nset=_PickedSet3, internal, generate
   1,  121,    1
*Elset, elset=_PickedSet3, internal, generate
   1,  100,    1
** Section: Section-1
*Shell Section, elset=_PickedSet3, material=Material-1
0.02, 3
*End Instance
**
*Nset, nset=_PickedSet9, internal, instance=Part-1-1, generate
 1801,  1840,     1
*Elset, elset=_PickedSet9, internal, instance=Part-1-1, generate
 1761,  1800,     1
*Nset, nset=_PickedSet11, internal, instance=Part-1-1, generate
  1,  40,   1
*Elset, elset=_PickedSet11, internal, instance=Part-1-1, generate
  1,  40,   1
*Nset, nset=_PickedSet12, internal, instance=Part-2-1
 122,
*Nset, nset=_PickedSet13, internal, instance=Part-2-1, generate
   1,  121,    1
*Elset, elset=_PickedSet13, internal, instance=Part-2-1, generate
   1,  100,    1
*Nset, nset=_PickedSet15, internal, instance=Part-3-1, generate
   1,  121,    1
*Elset, elset=_PickedSet15, internal, instance=Part-3-1, generate
   1,  100,    1
*Nset, nset=_PickedSet16, internal, instance=Part-2-1
 122,
*Elset, elset=__PickedSurf8_SNEG, internal, instance=Part-2-1, generate
   1,  100,    1
*Surface, type=ELEMENT, name=_PickedSurf8, internal
__PickedSurf8_SNEG, SNEG
*Elset, elset=__PickedSurf10_SPOS, internal, instance=Part-3-1, generate
   1,  100,    1
*Surface, type=ELEMENT, name=_PickedSurf10, internal
__PickedSurf10_SPOS, SPOS
*Surface, type=NODE, name=_PickedSet9_CNS_, internal
_PickedSet9, 1.
*Surface, type=NODE, name=_PickedSet11_CNS_, internal
_PickedSet11, 1.
** Constraint: Constraint-1
*Tie, name=Constraint-1, adjust=yes
_PickedSet11_CNS_, _PickedSurf10
** Constraint: Constraint-2
*Rigid Body, ref node=_PickedSet12, elset=_PickedSet13
*End Assembly
**
** MATERIALS
**
*Material, name=Material-1
*Elastic
 2e+11, 0.3
**
** INTERACTION PROPERTIES
**
*Surface Interaction, name=IntProp-1
1.,
*Friction
0.,
*Surface Behavior, pressure-overclosure=HARD
**
** BOUNDARY CONDITIONS
**
** Name: BC-1 Type: 对称/反对称/完全固定
*Boundary
_PickedSet15, ENCASTRE
**
** INTERACTIONS
**
** Interaction: Int-1
*Contact Pair, interaction=IntProp-1
_PickedSet9_CNS_, _PickedSurf8
** ----------------------------------------------------------------
**
** STEP: Step-1
**
*Step, name=Step-1, nlgeom=NO, perturbation
*Buckle
10, , 18, 50
**
** BOUNDARY CONDITIONS
**
** Name: BC-1 Type: 对称/反对称/完全固定
*Boundary, op=NEW, load case=1
_PickedSet15, ENCASTRE
*Boundary, op=NEW, load case=2
_PickedSet15, ENCASTRE
**
** LOADS
**
** Name: Load-1   Type: Concentrated force
*Cload
_PickedSet16, 3, 500.
**
** OUTPUT REQUESTS
**
*Restart, write, frequency=0
**
** FIELD OUTPUT: F-Output-1
**
*Output, field
*Node Output
U, UR, UT
*End Step
