*Heading
** Job name: Job-3 Model name: Model-1
** Generated by: Abaqus/CAE 2022
*Preprint, echo=NO, model=NO, history=NO, contact=NO
**
** PARTS
**
*Part, name=Part-1
*Node
      1,          10.,           2.,          50.
      2,          10.,           0.,          50.
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*Element, type=C3D4
   1,  714, 1243,  715, 1244
   2, 1243,  714, 1245, 1246
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*Nset, nset=Set-1, generate
    1,  2051,     1
*Elset, elset=Set-1, generate
    1,  8280,     1
** Section: Section-1
*Solid Section, elset=Set-1, material=SI_mm111111_45
,
*End Part
**
**
** ASSEMBLY
**
*Assembly, name=Assembly
**
*Instance, name=Part-1-1, part=Part-1
*End Instance
**
*Nset, nset=Cast, instance=Part-1-1
   3,   4,   6,   7,  59, 167
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*Nset, nset=Load, instance=Part-1-1
    1,    2,    5,    8,    9,  109
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*End Assembly
**
** MATERIALS
**
*Material, name=SI_mm111111_45
*Elastic
210000., 0.3
**
** BOUNDARY CONDITIONS
**
** Name: BC-1 Type: Displacement/Rotation
*Boundary
Cast, 1, 1
Cast, 2, 2
Cast, 3, 3
** ----------------------------------------------------------------
**
** STEP: Step-1
**
*Step, name=Step-1, nlgeom=NO
*Static
1., 1., 1e-05, 1.
**
** LOADS
**
** Name: Load-1   Type: Concentrated force
*Cload
Load, 2, -3.03
**
** OUTPUT REQUESTS
**
*Restart, write, frequency=0
**
** FIELD OUTPUT: F-Output-1
**
*Output, field, variable=PRESELECT
**
** HISTORY OUTPUT: H-Output-1
**
*Output, history, variable=PRESELECT
*End Step
