*Heading
** Job name: Job-1 Model name: Job-1
** Generated by: Abaqus/CAE 2020
*Preprint, echo=NO, model=NO, history=NO, contact=NO
**
** PARTS
**
*Part, name=PART-1
*Node
      1,           0.,           0.,           0.
      2,           0.,        0.125,           0.
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*Element, type=C3D10
1397, 1785, 2218, 2804, 2816, 2222, 2921, 2922, 2923, 2924, 2925
1398, 2218, 1785, 1789, 2816, 2222, 1793, 2223, 2924, 2923, 2926
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*Elset, elset=SET-1, generate
 1397,  4049,     1
** Section: Section-1-SET-1
*Solid Section, elset=SET-1, material=MATERIAL-1
,
*End Part
**
**
** ASSEMBLY
**
*Assembly, name=Assembly
**
*Instance, name=PART-1-1, part=PART-1
*End Instance
**
*Nset, nset=SET-1, instance=PART-1-1
  181,  182,  183,  184,  185,  186
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*Nset, nset=SET-2, instance=PART-1-1, generate
   1,  101,    1
*Nset, nset=Set-3, instance=PART-1-1
  181,  182,  183,  184,  185,  186
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*Nset, nset=Set-4, instance=PART-1-1
  181,  182,  183,  184,  185,  186
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*Elset, elset=_Surf-1_S1, internal, instance=PART-1-1
 2534, 2535, 2546, 2553, 2557, 2560
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*Elset, elset=_Surf-1_S2, internal, instance=PART-1-1
 3660, 3740, 3771, 3817, 3819, 3834, 3875, 3876, 3880, 3936, 3961
*Elset, elset=_Surf-1_S3, internal, instance=PART-1-1
 3599, 3654, 3668, 3874, 3878, 4029
*Elset, elset=_Surf-1_S4, internal, instance=PART-1-1
 3626, 3655, 3677, 3885
*Surface, type=ELEMENT, name=Surf-1
_Surf-1_S1, S1
_Surf-1_S2, S2
_Surf-1_S4, S4
_Surf-1_S3, S3
*Elset, elset=_Surf-2_S1, internal, instance=PART-1-1
 2534, 2535, 2546, 2553, 2557, 2560
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*Elset, elset=_Surf-2_S2, internal, instance=PART-1-1
 3660, 3740, 3771, 3817, 3819, 3834, 3875, 3876, 3880, 3936, 3961
*Elset, elset=_Surf-2_S3, internal, instance=PART-1-1
 3599, 3654, 3668, 3874, 3878, 4029
*Elset, elset=_Surf-2_S4, internal, instance=PART-1-1
 3626, 3655, 3677, 3885
*Surface, type=ELEMENT, name=Surf-2
_Surf-2_S1, S1
_Surf-2_S2, S2
_Surf-2_S4, S4
_Surf-2_S3, S3
*Elset, elset=_Surf-3_S1, internal, instance=PART-1-1
 2534, 2535, 2546, 2553, 2557, 2560
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*Elset, elset=_Surf-3_S2, internal, instance=PART-1-1
 3660, 3740, 3771, 3817, 3819, 3834, 3875, 3876, 3880, 3936, 3961
*Elset, elset=_Surf-3_S3, internal, instance=PART-1-1
 3599, 3654, 3668, 3874, 3878, 4029
*Elset, elset=_Surf-3_S4, internal, instance=PART-1-1
 3626, 3655, 3677, 3885
*Surface, type=ELEMENT, name=Surf-3
_Surf-3_S1, S1
_Surf-3_S2, S2
_Surf-3_S4, S4
_Surf-3_S3, S3
*End Assembly
**
** MATERIALS
**
*Material, name=MATERIAL-1
*Elastic
 2.1e+09, 0.3
** ----------------------------------------------------------------
**
** STEP: Step-1
**
*Step, name=Step-1, nlgeom=NO
*Static
1., 1., 1e-05, 1.
**
** BOUNDARY CONDITIONS
**
** Name: Disp-BC-1 Type: Symmetry/Antisymmetry/Encastre
*Boundary
SET-2, ENCASTRE
**
** LOADS
**
** Name: Load-1   Type: Surface traction
*Dsload
Surf-3, TRSHR, 1., 0., -1., 0.
**
** OUTPUT REQUESTS
**
*Restart, write, frequency=0
**
** FIELD OUTPUT: F-Output-1
**
*Output, field, variable=PRESELECT
**
** HISTORY OUTPUT: H-Output-1
**
*Output, history, variable=PRESELECT
*End Step
