*Heading
** Job name: Job-1 Model name: Model-1
** Generated by: Abaqus/CAE 2016
*Preprint, echo=NO, model=NO, history=NO, contact=NO
**
** PARTS
**
*Part, name=T-liang
*Node
      1,        1000.,        -110.,         125.
      2,        1000.,        -110.,          95.
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*Element, type=C3D8R
   1,    2,   16,   51,   17,   79,   93,  128,   94
   2,    3,   56,   53,   19,   80,  133,  130,   96
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*Nset, nset=_PickedSet3, internal, generate
    1,  3927,     1
*Elset, elset=_PickedSet3, internal, generate
    1,  2550,     1
** Section: Section-1
*Solid Section, elset=_PickedSet3, material=steel
,
*End Part
**
**
** ASSEMBLY
**
*Assembly, name=Assembly
**
*Instance, name=T-liang-1, part=T-liang
*End Instance
**
*Nset, nset=_PickedSet4, internal, instance=T-liang-1, generate
 3851,  3927,     1
*Elset, elset=_PickedSet4, internal, instance=T-liang-1, generate
 2500,  2550,     1
*Elset, elset=__PickedSurf5_S4, internal, instance=T-liang-1
   4,  13,  32,  34,  36,  37
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*Elset, elset=__PickedSurf5_S6, internal, instance=T-liang-1
  30,  31,  33,  35,  81,  82
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*Surface, type=ELEMENT, name=_PickedSurf5, internal
__PickedSurf5_S4, S4
__PickedSurf5_S6, S6
*End Assembly
**
** MATERIALS
**
*Material, name=steel
*Elastic
 2.1e+11, 0.3
** ----------------------------------------------------------------
**
** STEP: Step-1
**
*Step, name=Step-1, nlgeom=NO
*Static
1., 1., 1e-05, 1.
**
** BOUNDARY CONDITIONS
**
** Name: BC-1 Type: Symmetry/Antisymmetry/Encastre
*Boundary
_PickedSet4, ENCASTRE
**
** LOADS
**
** Name: Load-1   Type: Pressure
*Dsload
_PickedSurf5, P, 100.
**
** OUTPUT REQUESTS
**
*Restart, write, frequency=0
**
** FIELD OUTPUT: F-Output-1
**
*Output, field, variable=PRESELECT
**
** HISTORY OUTPUT: H-Output-1
**
*Output, history, variable=PRESELECT
*End Step
