*Heading
** Job name: Job-8 Model name: DataFile
** Generated by: Abaqus/CAE 2022
*Preprint, echo=NO, model=NO, history=NO, contact=NO
**
** PARTS
**
*Part, name=PART-1
*Node
      1,          50.,          20.,          40.
      2,         100.,          20.,          40.
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*Element, type=C3D8
  1,   82,  336,  712,  294,    1,   15,  168,   46
  2,  336,  337,  713,  712,   15,   16,  169,  168
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*Nset, nset=SET-1, generate
    1,  1341,     1
*Elset, elset=SET-1, generate
   1,  960,    1
*Nset, nset=FORCE
  5,  6, 56, 57, 58, 59, 60, 61, 62
** Section: Section-1-SET-1
*Solid Section, elset=SET-1, material=MATERIAL-1
,
*End Part
**
**
** ASSEMBLY
**
*Assembly, name=Assembly
**
*Instance, name=PART-1-1, part=PART-1
*End Instance
**
*Nset, nset=SET-1, instance=PART-1-1
   9,  12,  13,  14, 116, 117
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*Elset, elset=SET-1, instance=PART-1-1, generate
 321,  951,   10
*Nset, nset=force, instance=PART-1-1
  2,  3, 24, 25, 26, 27, 28, 29, 30
*Nset, nset=shuchudian, instance=PART-1-1
 27,
*End Assembly
**
** MATERIALS
**
*Material, name=MATERIAL-1
*Elastic
210000., 0.3
**
** BOUNDARY CONDITIONS
**
** Name: Disp-BC-1 Type: 位移/转角
*Boundary
SET-1, 1, 1
** Name: Disp-BC-2 Type: 位移/转角
*Boundary
SET-1, 2, 2
** Name: Disp-BC-3 Type: 位移/转角
*Boundary
SET-1, 3, 3
** ----------------------------------------------------------------
**
** STEP: Step-1
**
*Step, name=Step-1, nlgeom=NO, inc=1000
*Static
0.01, 1., 1e-05, 0.01
**
** LOADS
**
** Name: CFORCE-1   Type: Concentrated force
*Cload
force, 2, -500.
**
** OUTPUT REQUESTS
**
*Restart, write, frequency=0
**
** FIELD OUTPUT: F-Output-1
**
*Output, field, variable=PRESELECT
**
** HISTORY OUTPUT: H-Output-1
**
*Output, history
*Node Output, nset=PART-1-1.SET-1
RF2, U2
*Element Output, elset=PART-1-1.SET-1
E11, MISES, S11
**
** HISTORY OUTPUT: H-Output-2
**
*Node Output, nset=shuchudian
RF2, U2
*End Step
